<neuroml xmlns="http://www.neuroml.org/schema/neuroml2"  xmlns:xs="http://www.w3.org/2001/XMLSchema" xmlns:xsi="http://www.w3.org/2001/XMLSchema-instance" xsi:schemaLocation="http://www.neuroml.org/schema/neuroml2 https://raw.github.com/NeuroML/NeuroML2/development/Schemas/NeuroML2/NeuroML_v2beta5.xsd" id="GoCNet_00000_wGirk">
    <include href="../Cells/Golgi/GoC_00000_wGirk.cell.nml"/>
    <network id="GoCNet_00000_wGirk" type="networkWithTemperature" temperature="23 degC">
        <population id="GoC_00000_wGIRKPop" component="GoC_00000_wGIRK" size="1" type="populationList">
            <instance id="0">
                <location x="0." y="0." z="0."/>
            </instance>
        </population>
    </network>
</neuroml>
