<neuroml xmlns="http://www.neuroml.org/schema/neuroml2"  xmlns:xs="http://www.w3.org/2001/XMLSchema" xmlns:xsi="http://www.w3.org/2001/XMLSchema-instance" xsi:schemaLocation="http://www.neuroml.org/schema/neuroml2 https://raw.github.com/NeuroML/NeuroML2/development/Schemas/NeuroML2/NeuroML_v2beta5.xsd" id="gocNetwork">
    <include href="../Cells/Golgi/GoC_2Pools.cell.nml"/>
    <include href="../Mechanisms/MF_GoC_Syn.nml"/>
    <include href="../Mechanisms/MF_GoC_SynMult.nml"/>
    <gapJunction id="GJ_0" conductance="426pS"/>
    <spikeGeneratorPoisson id="MF_Poisson" averageRate="5 Hz"/>
    <transientPoissonFiringSynapse id="MF_Burst" averageRate="100 Hz" delay="2000 ms" duration="500 ms" synapse="MFGoC_SynMult" spikeTarget="./MFGoC_SynMult"/>
    <network id="gocNetwork" type="networkWithTemperature" temperature="23 degC">
        <population id="GoCl_2PoolsPop" component="GoCl_2Pools" size="45" type="populationList">
            <instance id="0">
                <location x="228.756354912613347" y="40.25243009354201" z="76.022629147921961"/>
            </instance>
            <instance id="1">
                <location x="168.766990499799363" y="305.366087313712342" z="16.986614473817596"/>
            </instance>
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        </population>
        <population id="MF_Poisson_pop" component="MF_Poisson" size="15" type="populationList">
            <instance id="0">
                <location x="230.579270946942813" y="295.49008949468714" z="12.467642571629067"/>
            </instance>
            <instance id="1">
                <location x="90.567765061163939" y="242.763941645348751" z="11.269464882644682"/>
            </instance>
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        </population>
        <projection id="MFtoGoC" presynapticPopulation="MF_Poisson_pop" postsynapticPopulation="GoCl_2PoolsPop" synapse="MFGoC_Syn">
            <connection id="0" preCellId="../MF_Poisson_pop/0/MF_Poisson" postCellId="../GoCl_2PoolsPop/9/GoCl_2Pools"/>
            <connection id="1" preCellId="../MF_Poisson_pop/0/MF_Poisson" postCellId="../GoCl_2PoolsPop/10/GoCl_2Pools"/>
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        </projection>
        <electricalProjection id="gocGJ" presynapticPopulation="GoCl_2PoolsPop" postsynapticPopulation="GoCl_2PoolsPop">
            <electricalConnectionInstanceW id="0" preCell="../GoCl_2PoolsPop/0/GoCl_2Pools" preSegment="5" postCell="../GoCl_2PoolsPop/3/GoCl_2Pools" postSegment="2" synapse="GJ_0" weight="2."/>
            <electricalConnectionInstanceW id="1" preCell="../GoCl_2PoolsPop/0/GoCl_2Pools" preSegment="5" postCell="../GoCl_2PoolsPop/4/GoCl_2Pools" postSegment="5" synapse="GJ_0" weight="1."/>
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        </electricalProjection>
        <explicitInput target="../GoCl_2PoolsPop/28/GoCl_2Pools" input="MF_Burst"/>
        <explicitInput target="../GoCl_2PoolsPop/28/GoCl_2Pools" input="MF_Burst"/>
        <explicitInput target="../GoCl_2PoolsPop/28/GoCl_2Pools" input="MF_Burst"/>
        <explicitInput target="../GoCl_2PoolsPop/28/GoCl_2Pools" input="MF_Burst"/>
        <explicitInput target="../GoCl_2PoolsPop/8/GoCl_2Pools" input="MF_Burst"/>
        <explicitInput target="../GoCl_2PoolsPop/8/GoCl_2Pools" input="MF_Burst"/>
        <explicitInput target="../GoCl_2PoolsPop/8/GoCl_2Pools" input="MF_Burst"/>
        <explicitInput target="../GoCl_2PoolsPop/8/GoCl_2Pools" input="MF_Burst"/>
        <explicitInput target="../GoCl_2PoolsPop/24/GoCl_2Pools" input="MF_Burst"/>
        <explicitInput target="../GoCl_2PoolsPop/24/GoCl_2Pools" input="MF_Burst"/>
        <explicitInput target="../GoCl_2PoolsPop/24/GoCl_2Pools" input="MF_Burst"/>
        <explicitInput target="../GoCl_2PoolsPop/24/GoCl_2Pools" input="MF_Burst"/>
        <explicitInput target="../GoCl_2PoolsPop/38/GoCl_2Pools" input="MF_Burst"/>
        <explicitInput target="../GoCl_2PoolsPop/38/GoCl_2Pools" input="MF_Burst"/>
        <explicitInput target="../GoCl_2PoolsPop/38/GoCl_2Pools" input="MF_Burst"/>
        <explicitInput target="../GoCl_2PoolsPop/38/GoCl_2Pools" input="MF_Burst"/>
    </network>
</neuroml>
