<?xml version="1.0" encoding="UTF-8"?>
<neuroml xmlns="http://www.neuroml.org/schema/neuroml2"  xmlns:xs="http://www.w3.org/2001/XMLSchema" xmlns:xsi="http://www.w3.org/2001/XMLSchema-instance" xsi:schemaLocation="http://www.neuroml.org/schema/neuroml2 https://raw.github.com/NeuroML/NeuroML2/development/Schemas/NeuroML2/NeuroML_v2beta5.xsd" id="gocNetwork_hetero">
    <include href="../Cells/Golgi/GoC_00025.cell.nml"/>
    <include href="../Cells/Golgi/GoC_00305.cell.nml"/>
    <include href="../Cells/Golgi/GoC_00848.cell.nml"/>
    <include href="../Cells/Golgi/GoC_00901.cell.nml"/>
    <include href="../Cells/Golgi/GoC_00956.cell.nml"/>
    <include href="../Mechanisms/MF_GoC_Syn.nml"/>
    <include href="../Mechanisms/MF_GoC_SynMult.nml"/>
    <gapJunction id="GJ_0" conductance="426pS"/>
    <spikeGeneratorPoisson id="MF_Poisson" averageRate="5 Hz"/>
    <transientPoissonFiringSynapse id="MF_Burst" averageRate="100 Hz" delay="2000 ms" duration="500 ms" synapse="MFGoC_SynMult" spikeTarget="./MFGoC_SynMult"/>
    <network id="gocNetwork_hetero" type="networkWithTemperature" temperature="23 degC">
        <population id="GoC_00025Pop" component="GoC_00025" size="9" type="populationList">
            <instance id="0">
                <location x="228.756354912613347" y="40.25243009354201" z="76.022629147921961"/>
            </instance>
            <instance id="1">
                <location x="168.766990499799363" y="305.366087313712342" z="16.986614473817596"/>
            </instance>
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        </population>
        <population id="GoC_00305Pop" component="GoC_00305" size="9" type="populationList">
            <instance id="0">
                <location x="230.038727849172346" y="267.989047950833537" z="44.326979040351532"/>
            </instance>
            <instance id="1">
                <location x="309.782527813709862" y="316.469165389076807" z="0.833736044716336"/>
            </instance>
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        </population>
        <population id="GoC_00848Pop" component="GoC_00848" size="9" type="populationList">
            <instance id="0">
                <location x="181.861504028237164" y="198.096090699174624" z="35.293391407006155"/>
            </instance>
            <instance id="1">
                <location x="48.144655023243551" y="74.740116898111978" z="10.669751368491438"/>
            </instance>
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        </population>
        <population id="GoC_00901Pop" component="GoC_00901" size="9" type="populationList">
            <instance id="0">
                <location x="339.639570357646107" y="244.686381926313004" z="71.278046394179142"/>
            </instance>
            <instance id="1">
                <location x="88.743451438232341" y="253.934487037387953" z="16.279554792096064"/>
            </instance>
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        </population>
        <population id="GoC_00956Pop" component="GoC_00956" size="9" type="populationList">
            <instance id="0">
                <location x="277.837769194107409" y="253.891102460931819" z="43.315142449390763"/>
            </instance>
            <instance id="1">
                <location x="168.904572607200038" y="166.767163630370192" z="35.682626435200831"/>
            </instance>
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        </population>
        <population id="MF_Poisson_pop" component="MF_Poisson" size="15" type="populationList">
            <instance id="0">
                <location x="230.579270946942813" y="295.49008949468714" z="12.467642571629067"/>
            </instance>
            <instance id="1">
                <location x="90.567765061163939" y="242.763941645348751" z="11.269464882644682"/>
            </instance>
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        </population>
        <projection id="MFtoGoC_00025" presynapticPopulation="MF_Poisson_pop" postsynapticPopulation="GoC_00025Pop" synapse="MFGoC_Syn">
            <connection id="0" preCellId="../MF_Poisson_pop/1/MF_Poisson" postCellId="../GoC_00025Pop/0/GoC_00025"/>
            <connection id="1" preCellId="../MF_Poisson_pop/1/MF_Poisson" postCellId="../GoC_00025Pop/4/GoC_00025"/>
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        </projection>
        <projection id="MFtoGoC_00305" presynapticPopulation="MF_Poisson_pop" postsynapticPopulation="GoC_00305Pop" synapse="MFGoC_Syn">
            <connection id="13" preCellId="../MF_Poisson_pop/0/MF_Poisson" postCellId="../GoC_00305Pop/0/GoC_00305"/>
            <connection id="14" preCellId="../MF_Poisson_pop/0/MF_Poisson" postCellId="../GoC_00305Pop/1/GoC_00305"/>
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        </projection>
        <projection id="MFtoGoC_00848" presynapticPopulation="MF_Poisson_pop" postsynapticPopulation="GoC_00848Pop" synapse="MFGoC_Syn">
            <connection id="27" preCellId="../MF_Poisson_pop/1/MF_Poisson" postCellId="../GoC_00848Pop/7/GoC_00848"/>
            <connection id="28" preCellId="../MF_Poisson_pop/4/MF_Poisson" postCellId="../GoC_00848Pop/0/GoC_00848"/>
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        </projection>
        <projection id="MFtoGoC_00901" presynapticPopulation="MF_Poisson_pop" postsynapticPopulation="GoC_00901Pop" synapse="MFGoC_Syn">
            <connection id="36" preCellId="../MF_Poisson_pop/4/MF_Poisson" postCellId="../GoC_00901Pop/3/GoC_00901"/>
            <connection id="37" preCellId="../MF_Poisson_pop/4/MF_Poisson" postCellId="../GoC_00901Pop/8/GoC_00901"/>
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        </projection>
        <projection id="MFtoGoC_00956" presynapticPopulation="MF_Poisson_pop" postsynapticPopulation="GoC_00956Pop" synapse="MFGoC_Syn">
            <connection id="48" preCellId="../MF_Poisson_pop/0/MF_Poisson" postCellId="../GoC_00956Pop/6/GoC_00956"/>
            <connection id="49" preCellId="../MF_Poisson_pop/1/MF_Poisson" postCellId="../GoC_00956Pop/1/GoC_00956"/>
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        </projection>
        <electricalProjection id="GJ_GoC_00025Pop_GoC_00025Pop" presynapticPopulation="GoC_00025Pop" postsynapticPopulation="GoC_00025Pop">
            <electricalConnectionInstanceW id="0" preCell="../GoC_00025Pop/0/GoC_00025" preSegment="5" postCell="../GoC_00025Pop/3/GoC_00025" postSegment="2" synapse="GJ_0" weight="1.581853914595993"/>
            <electricalConnectionInstanceW id="1" preCell="../GoC_00025Pop/0/GoC_00025" preSegment="5" postCell="../GoC_00025Pop/4/GoC_00025" postSegment="5" synapse="GJ_0" weight="1.060802744231962"/>
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        </electricalProjection>
        <electricalProjection id="GJ_GoC_00025Pop_GoC_00305Pop" presynapticPopulation="GoC_00025Pop" postsynapticPopulation="GoC_00305Pop">
            <electricalConnectionInstanceW id="0" preCell="../GoC_00025Pop/0/GoC_00025" preSegment="2" postCell="../GoC_00305Pop/3/GoC_00305" postSegment="2" synapse="GJ_0" weight="0.965572643799991"/>
            <electricalConnectionInstanceW id="1" preCell="../GoC_00025Pop/1/GoC_00025" preSegment="5" postCell="../GoC_00305Pop/1/GoC_00305" postSegment="1" synapse="GJ_0" weight="0.326148245808758"/>
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        </electricalProjection>
        <electricalProjection id="GJ_GoC_00025Pop_GoC_00848Pop" presynapticPopulation="GoC_00025Pop" postsynapticPopulation="GoC_00848Pop">
            <electricalConnectionInstanceW id="0" preCell="../GoC_00025Pop/0/GoC_00025" preSegment="5" postCell="../GoC_00848Pop/2/GoC_00848" postSegment="5" synapse="GJ_0" weight="0.50760732197956"/>
            <electricalConnectionInstanceW id="1" preCell="../GoC_00025Pop/1/GoC_00025" preSegment="2" postCell="../GoC_00848Pop/4/GoC_00848" postSegment="5" synapse="GJ_0" weight="2.159792448906147"/>
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        </electricalProjection>
        <electricalProjection id="GJ_GoC_00025Pop_GoC_00901Pop" presynapticPopulation="GoC_00025Pop" postsynapticPopulation="GoC_00901Pop">
            <electricalConnectionInstanceW id="0" preCell="../GoC_00025Pop/0/GoC_00025" preSegment="5" postCell="../GoC_00901Pop/2/GoC_00901" postSegment="2" synapse="GJ_0" weight="1.680866974701685"/>
            <electricalConnectionInstanceW id="1" preCell="../GoC_00025Pop/0/GoC_00025" preSegment="2" postCell="../GoC_00901Pop/5/GoC_00901" postSegment="5" synapse="GJ_0" weight="1.152176069126876"/>
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        </electricalProjection>
        <electricalProjection id="GJ_GoC_00025Pop_GoC_00956Pop" presynapticPopulation="GoC_00025Pop" postsynapticPopulation="GoC_00956Pop">
            <electricalConnectionInstanceW id="0" preCell="../GoC_00025Pop/0/GoC_00025" preSegment="1" postCell="../GoC_00956Pop/2/GoC_00956" postSegment="1" synapse="GJ_0" weight="0.843995280710267"/>
            <electricalConnectionInstanceW id="1" preCell="../GoC_00025Pop/0/GoC_00025" preSegment="5" postCell="../GoC_00956Pop/6/GoC_00956" postSegment="5" synapse="GJ_0" weight="0.960491450015489"/>
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        </electricalProjection>
        <electricalProjection id="GJ_GoC_00305Pop_GoC_00305Pop" presynapticPopulation="GoC_00305Pop" postsynapticPopulation="GoC_00305Pop">
            <electricalConnectionInstanceW id="0" preCell="../GoC_00305Pop/0/GoC_00305" preSegment="5" postCell="../GoC_00305Pop/3/GoC_00305" postSegment="5" synapse="GJ_0" weight="0.450245352769994"/>
            <electricalConnectionInstanceW id="1" preCell="../GoC_00305Pop/0/GoC_00305" preSegment="2" postCell="../GoC_00305Pop/5/GoC_00305" postSegment="1" synapse="GJ_0" weight="0.790232681418398"/>
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        </electricalProjection>
        <electricalProjection id="GJ_GoC_00305Pop_GoC_00848Pop" presynapticPopulation="GoC_00305Pop" postsynapticPopulation="GoC_00848Pop">
            <electricalConnectionInstanceW id="0" preCell="../GoC_00305Pop/0/GoC_00305" preSegment="2" postCell="../GoC_00848Pop/4/GoC_00848" postSegment="5" synapse="GJ_0" weight="2.291878088032063"/>
            <electricalConnectionInstanceW id="1" preCell="../GoC_00305Pop/0/GoC_00305" preSegment="5" postCell="../GoC_00848Pop/6/GoC_00848" postSegment="1" synapse="GJ_0" weight="3.644999837375456"/>
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        </electricalProjection>
        <electricalProjection id="GJ_GoC_00305Pop_GoC_00901Pop" presynapticPopulation="GoC_00305Pop" postsynapticPopulation="GoC_00901Pop">
            <electricalConnectionInstanceW id="0" preCell="../GoC_00305Pop/0/GoC_00305" preSegment="2" postCell="../GoC_00901Pop/4/GoC_00901" postSegment="5" synapse="GJ_0" weight="1.138345667724203"/>
            <electricalConnectionInstanceW id="1" preCell="../GoC_00305Pop/0/GoC_00305" preSegment="1" postCell="../GoC_00901Pop/8/GoC_00901" postSegment="5" synapse="GJ_0" weight="3.133303423437081"/>
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        </electricalProjection>
        <electricalProjection id="GJ_GoC_00305Pop_GoC_00956Pop" presynapticPopulation="GoC_00305Pop" postsynapticPopulation="GoC_00956Pop">
            <electricalConnectionInstanceW id="0" preCell="../GoC_00305Pop/0/GoC_00305" preSegment="5" postCell="../GoC_00956Pop/0/GoC_00956" postSegment="5" synapse="GJ_0" weight="2.466138206556506"/>
            <electricalConnectionInstanceW id="1" preCell="../GoC_00305Pop/0/GoC_00305" preSegment="1" postCell="../GoC_00956Pop/4/GoC_00956" postSegment="5" synapse="GJ_0" weight="1.297980662139931"/>
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        </electricalProjection>
        <electricalProjection id="GJ_GoC_00848Pop_GoC_00848Pop" presynapticPopulation="GoC_00848Pop" postsynapticPopulation="GoC_00848Pop">
            <electricalConnectionInstanceW id="0" preCell="../GoC_00848Pop/0/GoC_00848" preSegment="2" postCell="../GoC_00848Pop/3/GoC_00848" postSegment="5" synapse="GJ_0" weight="2.521784136424202"/>
            <electricalConnectionInstanceW id="1" preCell="../GoC_00848Pop/0/GoC_00848" preSegment="2" postCell="../GoC_00848Pop/6/GoC_00848" postSegment="5" synapse="GJ_0" weight="1.570558980856666"/>
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        </electricalProjection>
        <electricalProjection id="GJ_GoC_00848Pop_GoC_00901Pop" presynapticPopulation="GoC_00848Pop" postsynapticPopulation="GoC_00901Pop">
            <electricalConnectionInstanceW id="0" preCell="../GoC_00848Pop/0/GoC_00848" preSegment="5" postCell="../GoC_00901Pop/1/GoC_00901" postSegment="2" synapse="GJ_0" weight="0.781048793110452"/>
            <electricalConnectionInstanceW id="1" preCell="../GoC_00848Pop/0/GoC_00848" preSegment="5" postCell="../GoC_00901Pop/3/GoC_00901" postSegment="2" synapse="GJ_0" weight="0.431279518051607"/>
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        </electricalProjection>
        <electricalProjection id="GJ_GoC_00848Pop_GoC_00956Pop" presynapticPopulation="GoC_00848Pop" postsynapticPopulation="GoC_00956Pop">
            <electricalConnectionInstanceW id="0" preCell="../GoC_00848Pop/0/GoC_00848" preSegment="1" postCell="../GoC_00956Pop/0/GoC_00956" postSegment="5" synapse="GJ_0" weight="0.762218426177103"/>
            <electricalConnectionInstanceW id="1" preCell="../GoC_00848Pop/0/GoC_00848" preSegment="1" postCell="../GoC_00956Pop/1/GoC_00956" postSegment="1" synapse="GJ_0" weight="3.209688958030328"/>
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        </electricalProjection>
        <electricalProjection id="GJ_GoC_00901Pop_GoC_00901Pop" presynapticPopulation="GoC_00901Pop" postsynapticPopulation="GoC_00901Pop">
            <electricalConnectionInstanceW id="0" preCell="../GoC_00901Pop/1/GoC_00901" preSegment="1" postCell="../GoC_00901Pop/4/GoC_00901" postSegment="2" synapse="GJ_0" weight="0.986549121574395"/>
            <electricalConnectionInstanceW id="1" preCell="../GoC_00901Pop/2/GoC_00901" preSegment="5" postCell="../GoC_00901Pop/3/GoC_00901" postSegment="1" synapse="GJ_0" weight="1.065523093533417"/>
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        </electricalProjection>
        <electricalProjection id="GJ_GoC_00901Pop_GoC_00956Pop" presynapticPopulation="GoC_00901Pop" postsynapticPopulation="GoC_00956Pop">
            <electricalConnectionInstanceW id="0" preCell="../GoC_00901Pop/0/GoC_00901" preSegment="1" postCell="../GoC_00956Pop/0/GoC_00956" postSegment="5" synapse="GJ_0" weight="1.786411888418523"/>
            <electricalConnectionInstanceW id="1" preCell="../GoC_00901Pop/0/GoC_00901" preSegment="5" postCell="../GoC_00956Pop/4/GoC_00956" postSegment="5" synapse="GJ_0" weight="0.474165467724051"/>
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        </electricalProjection>
        <electricalProjection id="GJ_GoC_00956Pop_GoC_00956Pop" presynapticPopulation="GoC_00956Pop" postsynapticPopulation="GoC_00956Pop">
            <electricalConnectionInstanceW id="0" preCell="../GoC_00956Pop/0/GoC_00956" preSegment="2" postCell="../GoC_00956Pop/1/GoC_00956" postSegment="1" synapse="GJ_0" weight="0.356584769952327"/>
            <electricalConnectionInstanceW id="1" preCell="../GoC_00956Pop/0/GoC_00956" preSegment="1" postCell="../GoC_00956Pop/3/GoC_00956" postSegment="5" synapse="GJ_0" weight="0.757751024436714"/>
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        </electricalProjection>
        <explicitInput target="../GoC_00025Pop/8/GoC_00025" input="MF_Burst"/>
        <explicitInput target="../GoC_00025Pop/8/GoC_00025" input="MF_Burst"/>
        <explicitInput target="../GoC_00025Pop/8/GoC_00025" input="MF_Burst"/>
        <explicitInput target="../GoC_00025Pop/8/GoC_00025" input="MF_Burst"/>
        <explicitInput target="../GoC_00848Pop/6/GoC_00848" input="MF_Burst"/>
        <explicitInput target="../GoC_00848Pop/6/GoC_00848" input="MF_Burst"/>
        <explicitInput target="../GoC_00848Pop/6/GoC_00848" input="MF_Burst"/>
        <explicitInput target="../GoC_00848Pop/6/GoC_00848" input="MF_Burst"/>
        <explicitInput target="../GoC_00901Pop/1/GoC_00901" input="MF_Burst"/>
        <explicitInput target="../GoC_00901Pop/1/GoC_00901" input="MF_Burst"/>
        <explicitInput target="../GoC_00901Pop/1/GoC_00901" input="MF_Burst"/>
        <explicitInput target="../GoC_00901Pop/1/GoC_00901" input="MF_Burst"/>
        <explicitInput target="../GoC_00956Pop/2/GoC_00956" input="MF_Burst"/>
        <explicitInput target="../GoC_00956Pop/2/GoC_00956" input="MF_Burst"/>
        <explicitInput target="../GoC_00956Pop/2/GoC_00956" input="MF_Burst"/>
        <explicitInput target="../GoC_00956Pop/2/GoC_00956" input="MF_Burst"/>
    </network>
</neuroml>
