<neuroml xmlns="http://www.neuroml.org/schema/neuroml2"  xmlns:xs="http://www.w3.org/2001/XMLSchema" xmlns:xsi="http://www.w3.org/2001/XMLSchema-instance" xsi:schemaLocation="http://www.neuroml.org/schema/neuroml2 https://raw.github.com/NeuroML/NeuroML2/development/Schemas/NeuroML2/NeuroML_v2beta5.xsd" id="gocNetwork">
    <include href="../Cells/Golgi/GoC_00000_wGIRK.cell.nml"/>
    <include href="../Mechanisms/MF_GoC_Syn.nml"/>
    <include href="../Mechanisms/MF_GoC_SynMult.nml"/>
    <gapJunction id="GJ_0" conductance="426pS"/>
    <spikeGeneratorPoisson id="MF_Poisson" averageRate="5 Hz"/>
    <transientPoissonFiringSynapse id="MF_Burst" averageRate="100 Hz" delay="2000 ms" duration="500 ms" synapse="MFGoC_SynMult" spikeTarget="./MFGoC_SynMult"/>
    <network id="gocNetwork" type="networkWithTemperature" temperature="23 degC">
        <population id="GoC_00000_wGIRKPop" component="GoC_00000_wGIRK" size="45" type="populationList">
            <instance id="0">
                <location x="228.756354912613347" y="40.25243009354201" z="76.022629147921961"/>
            </instance>
            <instance id="1">
                <location x="168.766990499799363" y="305.366087313712342" z="16.986614473817596"/>
            </instance>
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        </population>
        <population id="MF_Poisson_pop" component="MF_Poisson" size="15" type="populationList">
            <instance id="0">
                <location x="230.579270946942813" y="295.49008949468714" z="12.467642571629067"/>
            </instance>
            <instance id="1">
                <location x="90.567765061163939" y="242.763941645348751" z="11.269464882644682"/>
            </instance>
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        </population>
        <projection id="MFtoGoC" presynapticPopulation="MF_Poisson_pop" postsynapticPopulation="GoC_00000_wGIRKPop" synapse="MFGoC_Syn">
            <connection id="0" preCellId="../MF_Poisson_pop/0/MF_Poisson" postCellId="../GoC_00000_wGIRKPop/9/GoC_00000_wGIRK"/>
            <connection id="1" preCellId="../MF_Poisson_pop/0/MF_Poisson" postCellId="../GoC_00000_wGIRKPop/10/GoC_00000_wGIRK"/>
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        </projection>
        <electricalProjection id="gocGJ" presynapticPopulation="GoC_00000_wGIRKPop" postsynapticPopulation="GoC_00000_wGIRKPop">
            <electricalConnectionInstanceW id="0" preCell="../GoC_00000_wGIRKPop/0/GoC_00000_wGIRK" preSegment="5" postCell="../GoC_00000_wGIRKPop/3/GoC_00000_wGIRK" postSegment="2" synapse="GJ_0" weight="2."/>
            <electricalConnectionInstanceW id="1" preCell="../GoC_00000_wGIRKPop/0/GoC_00000_wGIRK" preSegment="5" postCell="../GoC_00000_wGIRKPop/4/GoC_00000_wGIRK" postSegment="5" synapse="GJ_0" weight="1."/>
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        </electricalProjection>
        <explicitInput target="../GoC_00000_wGIRKPop/28/GoC_00000_wGIRK" input="MF_Burst"/>
        <explicitInput target="../GoC_00000_wGIRKPop/28/GoC_00000_wGIRK" input="MF_Burst"/>
        <explicitInput target="../GoC_00000_wGIRKPop/28/GoC_00000_wGIRK" input="MF_Burst"/>
        <explicitInput target="../GoC_00000_wGIRKPop/28/GoC_00000_wGIRK" input="MF_Burst"/>
        <explicitInput target="../GoC_00000_wGIRKPop/8/GoC_00000_wGIRK" input="MF_Burst"/>
        <explicitInput target="../GoC_00000_wGIRKPop/8/GoC_00000_wGIRK" input="MF_Burst"/>
        <explicitInput target="../GoC_00000_wGIRKPop/8/GoC_00000_wGIRK" input="MF_Burst"/>
        <explicitInput target="../GoC_00000_wGIRKPop/8/GoC_00000_wGIRK" input="MF_Burst"/>
        <explicitInput target="../GoC_00000_wGIRKPop/24/GoC_00000_wGIRK" input="MF_Burst"/>
        <explicitInput target="../GoC_00000_wGIRKPop/24/GoC_00000_wGIRK" input="MF_Burst"/>
        <explicitInput target="../GoC_00000_wGIRKPop/24/GoC_00000_wGIRK" input="MF_Burst"/>
        <explicitInput target="../GoC_00000_wGIRKPop/24/GoC_00000_wGIRK" input="MF_Burst"/>
        <explicitInput target="../GoC_00000_wGIRKPop/38/GoC_00000_wGIRK" input="MF_Burst"/>
        <explicitInput target="../GoC_00000_wGIRKPop/38/GoC_00000_wGIRK" input="MF_Burst"/>
        <explicitInput target="../GoC_00000_wGIRKPop/38/GoC_00000_wGIRK" input="MF_Burst"/>
        <explicitInput target="../GoC_00000_wGIRKPop/38/GoC_00000_wGIRK" input="MF_Burst"/>
    </network>
</neuroml>
