<neuroml xmlns="http://www.neuroml.org/schema/neuroml2"  xmlns:xs="http://www.w3.org/2001/XMLSchema" xmlns:xsi="http://www.w3.org/2001/XMLSchema-instance" xsi:schemaLocation="http://www.neuroml.org/schema/neuroml2 https://raw.github.com/NeuroML/NeuroML2/development/Schemas/NeuroML2/NeuroML_v2beta5.xsd" id="gocNetwork">
    <include href="GoC_2Pools.cell.mml"/>
    <gapJunction id="GJ_0" conductance="426pS"/>
    <network id="gocNetwork" type="networkWithTemperature" temperature="23 degC">
        <population id="GoCl_2PoolsPop" component="GoCl_2Pools" size="1" type="populationList">
            <instance id="0">
                <location x="228.756354912613347" y="40.25243009354201" z="76.022629147921961"/>
            </instance>
        </population>
    </network>
</neuroml>
