<?xml version="1.0" encoding="UTF-8"?>
<neuroml xmlns="http://www.neuroml.org/schema/neuroml2"  xmlns:xs="http://www.w3.org/2001/XMLSchema" xmlns:xsi="http://www.w3.org/2001/XMLSchema-instance" xsi:schemaLocation="http://www.neuroml.org/schema/neuroml2 https://raw.github.com/NeuroML/NeuroML2/development/Schemas/NeuroML2/NeuroML_v2beta5.xsd" id="gocNetwork">
    <include href="GoC_2Pools.cell.nml"/>
    <include href="MF_GoC_Syn.nml"/>
    <include href="MF_GoC_SynMult.nml"/>
    <gapJunction id="GJ_0" conductance="426pS"/>
    <spikeGeneratorPoisson id="MF_Poisson" averageRate="5 Hz"/>
    <transientPoissonFiringSynapse id="MF_Burst" averageRate="100 Hz" delay="2000 ms" duration="500 ms" synapse="MFGoC_SynMult" spikeTarget="./MFGoC_SynMult"/>
    <network id="gocNetwork" type="networkWithTemperature" temperature="23 degC">
        <population id="GoCl_2PoolsPop" component="GoCl_2Pools" size="45" type="populationList">
            <instance id="0">
                <location x="228.756354912613347" y="40.25243009354201" z="76.022629147921961"/>
            </instance>
            <instance id="1">
                <location x="168.766990499799363" y="305.366087313712342" z="16.986614473817596"/>
            </instance>
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        </population>
        <population id="MF_Poisson_pop" component="MF_Poisson" size="15" type="populationList">
            <instance id="0">
                <location x="230.579270946942813" y="295.49008949468714" z="12.467642571629067"/>
            </instance>
            <instance id="1">
                <location x="90.567765061163939" y="242.763941645348751" z="11.269464882644682"/>
            </instance>
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        </population>
    </network>
</neuroml>
