<neuroml xmlns="http://www.neuroml.org/schema/neuroml2"  xmlns:xs="http://www.w3.org/2001/XMLSchema" xmlns:xsi="http://www.w3.org/2001/XMLSchema-instance" xsi:schemaLocation="http://www.neuroml.org/schema/neuroml2 https://raw.github.com/NeuroML/NeuroML2/development/Schemas/NeuroML2/NeuroML_v2beta5.xsd" id="gocNetwork">
    <include href="GoC.cell.nml"/>
    <include href="MF_GoC_Syn.nml"/>
    <include href="MF_GoC_SynMult.nml"/>
    <gapJunction id="GJ_0" conductance="426pS"/>
    <spikeGeneratorPoisson id="MF_Poisson" averageRate="5 Hz"/>
    <transientPoissonFiringSynapse id="MF_Burst" averageRate="100 Hz" delay="2000 ms" duration="500 ms" synapse="MFGoC_SynMult" spikeTarget="./MFGoC_SynMult"/>
    <network id="gocNetwork" type="networkWithTemperature" temperature="23 degC">
        <population id="GoClPop" component="GoCl" size="45" type="populationList">
            <instance id="0">
                <location x="109.563910780800171" y="80.634124606114739" z="8.849185414541836"/>
            </instance>
            <instance id="1">
                <location x="137.92857080475477" y="55.320950308632959" z="45.726269718396033"/>
            </instance>
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        </population>
        <population id="MF_Poisson_pop" component="MF_Poisson" size="15" type="populationList">
            <instance id="0">
                <location x="307.272169587668884" y="87.161327220545033" z="64.265760301997346"/>
            </instance>
            <instance id="1">
                <location x="90.342638499139497" y="137.466928519233534" z="13.633634448734249"/>
            </instance>
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        </population>
        <projection id="MFtoGoC" presynapticPopulation="MF_Poisson_pop" postsynapticPopulation="GoClPop" synapse="MFGoC_Syn">
            <connection id="0" preCellId="../MF_Poisson_pop/0/MF_Poisson" postCellId="../GoClPop/1/GoCl"/>
            <connection id="1" preCellId="../MF_Poisson_pop/0/MF_Poisson" postCellId="../GoClPop/2/GoCl"/>
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        </projection>
        <electricalProjection id="gocGJ" presynapticPopulation="GoClPop" postsynapticPopulation="GoClPop">
            <electricalConnectionInstanceW id="0" preCell="../GoClPop/0/GoCl" preSegment="1" postCell="../GoClPop/12/GoCl" postSegment="1" synapse="GJ_0" weight="4."/>
            <electricalConnectionInstanceW id="1" preCell="../GoClPop/0/GoCl" preSegment="1" postCell="../GoClPop/14/GoCl" postSegment="1" synapse="GJ_0" weight="2."/>
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        </electricalProjection>
        <explicitInput target="../GoClPop/31/GoCl" input="MF_Burst"/>
        <explicitInput target="../GoClPop/31/GoCl" input="MF_Burst"/>
        <explicitInput target="../GoClPop/31/GoCl" input="MF_Burst"/>
        <explicitInput target="../GoClPop/31/GoCl" input="MF_Burst"/>
        <explicitInput target="../GoClPop/27/GoCl" input="MF_Burst"/>
        <explicitInput target="../GoClPop/27/GoCl" input="MF_Burst"/>
        <explicitInput target="../GoClPop/27/GoCl" input="MF_Burst"/>
        <explicitInput target="../GoClPop/27/GoCl" input="MF_Burst"/>
        <explicitInput target="../GoClPop/44/GoCl" input="MF_Burst"/>
        <explicitInput target="../GoClPop/44/GoCl" input="MF_Burst"/>
        <explicitInput target="../GoClPop/44/GoCl" input="MF_Burst"/>
        <explicitInput target="../GoClPop/44/GoCl" input="MF_Burst"/>
        <explicitInput target="../GoClPop/20/GoCl" input="MF_Burst"/>
        <explicitInput target="../GoClPop/20/GoCl" input="MF_Burst"/>
        <explicitInput target="../GoClPop/20/GoCl" input="MF_Burst"/>
        <explicitInput target="../GoClPop/20/GoCl" input="MF_Burst"/>
    </network>
</neuroml>
